# Варіант 1
# Вхідні дані:
m := 0.01
f := 0.5
c := 1
x(0) == 0.01
d/dt(x(0)) == 0
m*d^2/dt^2(x) + f*(d/dt(x)) + c*x == 0
# Характеристичне рівняння:
P := m*p^2 + f*p + c == 0 solve, p → [-2.08712152522; -47.9128784748]
x(t) := C1*e^(P[0]*t) + C2*e^(P[1]*t)
dxdt(t) := d/dt(x(t))
x(0) == 0.01 solve, C1 → 0.01 - C2
dxdt(0) == 0 solve, C1 → -22.9564392374*C2
C2 := 0.01 - C2 == -22.9564392374*C2 solve, C2 → -0.0004554472559
C1 := 0.01 - C2 == -0.0004554472559
x(t) := C1*e^(P[0]*t) + C2*e^(P[1]*t)
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c := 5
# Характеристичне рівняння:
P := m*p^2 + f*p + c == 0 solve, p → [-36.1803398875; -13.8196601125]
x(t) := C12*e^(P[0]*t) + C22*e^(P[1]*t)
dxdt(t) := d/dt(x(t))
x(0) == 0.01 solve, C12 → 0.01 - C22
dxdt(0) == 0 solve, C12 → -0.38196601125*C22
C22 := 0.01 - C22 == -22.9564392374*C22 solve, C22 → -0.0004554472559
C12 := 0.01 - C22 == -0.0004554472559
x(t) := C12*e^(P[0]*t) + C22*e^(P[1]*t)
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c := 10
# Характеристичне рівняння:
P := m*p^2 + f*p + c == 0 solve, p → [-25.0 - 19.364916731i; -25.0 + 19.364916731i] = [-25 - 19.3649i; -25 + 19.3649i]
x(t) := C13*e^(-25*t)*cos(19.365*t) + C23*e^(-25*t)*sin(19.365*t)
dxdt(t) := d/dt(x(t))
x(0) == 0.01 solve, C13 → 0.01
dxdt(0) == 0 solve, C13 → 0.7746*C23
C23 := 0.01 - C23 == -22.9564392374*C23 solve, C23 → -0.0004554472559
C13 := 0.01 - C23 == -0.0004554472559
x(t) := C13*e^(-25*t)*cos(19.365*t) + C23*e^(-25*t)*sin(19.365*t)
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