# Завдання 1
a := 0
m := 4
b := 1
T := 1
S(t, n) := (t/T)^((n + 1)*(1 + 3*(n + 1 ≥ m))/4 - m*(n + 1 ≥ m))
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w(i, j) := integral(S(t, i)*S(t, j), t = a .. b)
W := matrix(2*m, 2*m, w)
W → [
    2/3, 4/7, 1/2, 4/5, 4/9, 4/13, 4/17, 4/21;
    4/7, 1/2, 4/9, 2/3, 2/5, 2/7, 2/9, 2/11;
    1/2, 4/9, 2/5, 4/7, 4/11, 4/15, 4/19, 4/23;
    4/5, 2/3, 4/7, 1, 1/2, 1/3, 1/4, 1/5;
    4/9, 2/5, 4/11, 1/2, 1/3, 1/4, 1/5, 1/6;
    4/13, 2/7, 4/15, 1/3, 1/4, 1/5, 1/6, 1/7;
    4/17, 2/9, 4/19, 1/4, 1/5, 1/6, 1/7, 1/8;
    4/21, 2/11, 4/23, 1/5, 1/6, 1/7, 1/8, 1/9
] = [
    0.666667, 0.571429, 0.5, 0.8, 0.444444, 0.307692, 0.235294, 0.190476;
    0.571429, 0.5, 0.444444, 0.666667, 0.4, 0.285714, 0.222222, 0.181818;
    0.5, 0.444444, 0.4, 0.571429, 0.363636, 0.266667, 0.210526, 0.173913;
    0.8, 0.666667, 0.571429, 1, 0.5, 0.333333, 0.25, 0.2;
    0.444444, 0.4, 0.363636, 0.5, 0.333333, 0.25, 0.2, 0.166667;
    0.307692, 0.285714, 0.266667, 0.333333, 0.25, 0.2, 0.166667, 0.142857;
    0.235294, 0.222222, 0.210526, 0.25, 0.2, 0.166667, 0.142857, 0.125;
    0.190476, 0.181818, 0.173913, 0.2, 0.166667, 0.142857, 0.125, 0.111111
]
# Завдання 2
x(t) := e^(-t)
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q(i, j) := integral(x(t)*S(t, i), t = a .. b)
Q := matrix(2*m, 1, q) = [0.47696; 0.378945; 0.312209; 0.632121; 0.264241; 0.160603; 0.113929; 0.0878363]
X := W^-1*Q = [0.000634906; -0.00374692; 0.00609497; 1.00001; -1.00213; 0.493909; -0.151504; 0.0246251]
xa(t) := sum(X[i]*S(t, i), i = 0 .. 2*m - 1)
xa(t) → -1.00212583994*t + 0.493908791206*t^2 + (-0.151503551475*t^3) + 0.0246250505661*t^4 + (-0.00374691727302*sqrt(t)) + 0.000634905531115*t^(1/4) + 0.00609496700781*t^(3/4) + 1.00000527404
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# Завдання 3
y(t) := cos(π*t^2)
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q(i, j) := integral(y(t)*S(t, i), t = a .. b)
Q := matrix(2*m, 1, q) = [0.210544; 0.110074; 0.0445138; 0.373983; 0; -0.0803501; -0.101321; -0.10441]
X := W^-1*Q = [-1.69796; -0.767884; 18.5319; 1.26443; -26.0816; 28.874; -39.299; 18.1552]
ya(t) := sum(X[i]*S(t, i), i = 0 .. 2*m - 1)
ya(t) → -26.0816113057*t + 28.8740075613*t^2 + (-39.2989912881*t^3) + 18.1552085766*t^4 + (-0.76788432409*sqrt(t)) + (-1.69795925159*t^(1/4)) + 18.5319367515*t^(3/4) + 1.2644297623
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# Завдання 4
a := 0
m := 5
b := π/2
S(t, n) := e^(t*(-n))
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w(i, j) := integral(S(t, i)*S(t, j), t = a .. b)
W := matrix(m, m, w) = [
    1.5708, 0.79212, 0.478393, 0.330339, 0.249533;
    0.79212, 0.478393, 0.330339, 0.249533, 0.199922;
    0.478393, 0.330339, 0.249533, 0.199922, 0.166653;
    0.330339, 0.249533, 0.199922, 0.166653, 0.142855;
    0.249533, 0.199922, 0.166653, 0.142855, 0.125
]
f(t) := e^(-t)*sin(π*t)
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q(i, j) := integral(f(t)*S(t, i), t = a .. b)
Q := matrix(m, 1, q) = [0.294426; 0.230428; 0.167553; 0.121671; 0.090142]
X := W^-1*Q = [1.47015; -17.6018; 58.6928; -68.5671; 26.0487]
fa(t) := sum(X[i]*S(t, i), i = 0 .. m - 1)
fa(t) → -17.6017656955*e^(-t) + 58.6927582403*e^(-2*t) + (-68.5670836826*e^(-3*t)) + 26.0486871285*e^(-4*t) + 1.47014702704
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# Завдання 5
m := 9
S(t, n) := (n == 0)*1 + (n ≥ 1 and n ≤ 4)*cos(4*n*t) + (n ≥ 5 and n ≤ 8)*sin(4*(n - 4)*t)
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w(i, j) := integral(S(t, i)*S(t, j), t = a .. b)
W := matrix(m, m, w) = [
    1.5708, 0, 0, 0, 0, 0, 0, 0, 0;
    0, 0.785398, 0, 0, 0, 0, 0, 0, 0;
    0, 0, 0.785398, 0, 0, 0, 0, 0, 0;
    0, 0, 0, 0.785398, 0, 0, 0, 0, 0;
    0, 0, 0, 0, 0.785398, 0, 0, 0, 0;
    0, 0, 0, 0, 0, 0.785398, 0, 0, 0;
    0, 0, 0, 0, 0, 0, 0.785398, 0, 0;
    0, 0, 0, 0, 0, 0, 0, 0.785398, 0;
    0, 0, 0, 0, 0, 0, 0, 0, 0.785398
]
f(t) := e^(-t)*sin(π*t)
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q(i, j) := integral(f(t)*S(t, i), t = a .. b)
Q := matrix(m, 1, q) = [0.294426; -0.109947; -0.0467968; -0.0200911; -0.011138; 0.329528; 0.0446227; 0.0218981; 0.0146884]
X := W^-1*Q = [0.187437; -0.139988; -0.0595835; -0.0255808; -0.0141814; 0.419568; 0.0568154; 0.0278815; 0.0187018]
fa(t) := sum(X[i]*S(t, i), i = 0 .. m - 1)
fa(t) → -0.139988396583*cos(4*t) + (-0.0595835065527*cos(8*t)) + (-0.0255808302344*cos(12*t)) + (-0.0141813659801*cos(16*t)) + 0.419568169783*sin(4*t) + 0.056815371105*sin(8*t) + 0.0278814651306*sin(12*t) + 0.0187017924737*sin(16*t) + 0.187437420059
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# Завдання 6
a := -90
m := 16
b := 90
S1(x, n) :=
    1 if n == 0
    x if n == 1
    (2*n + 1)/(n + 1)*x*S1(x, n - 1) - n/(n + 1)*S1(x, n - 2) otherwise  # //Leg(n,x) - built-in function
x := -90 .. 90
n := 0 .. m
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w(i, j) := integral(S1(t, i)*S1(t, j), t = a .. b)
W := matrix(m, m, w) = [
    180, 0, 809880, 0, 0, 0, 0, 0, 0, 0, 0, 0, 0, 0, 0, 0;
    0, 486000, 0, 0, 0, 0, 0, 0, 0, 0, 0, 0, 0, 0, 0, 0;
    809880, 0, 0, 0, 0, 0, 0, 0, 0, 0, 0, 0, 0, 0, 0, 0;
    0, 0, 0, 0, 0, 0, 0, 0, 0, 0, 0, 0, 0, 0, 0, 0;
    0, 0, 0, 0, 0, 0, 0, 0, 0, 0, 0, 0, 0, 0, 0, 0;
    0, 0, 0, 0, 0, 0, 0, 0, 0, 0, 0, 0, 0, 0, 0, 0;
    0, 0, 0, 0, 0, 0, 0, 0, 0, 0, 0, 0, 0, 0, 0, 0;
    0, 0, 0, 0, 0, 0, 0, 0, 0, 0, 0, 0, 0, 0, 0, 0;
    0, 0, 0, 0, 0, 0, 0, 0, 0, 0, 0, 0, 0, 0, 0, 0;
    0, 0, 0, 0, 0, 0, 0, 0, 0, 0, 0, 0, 0, 0, 0, 4.22067e53;
    0, 0, 0, 0, 0, 0, 0, 0, 0, 0, 0, 0, 0, 0, 4.15878e53, 0;
    0, 0, 0, 0, 0, 0, 0, 0, 0, 0, 0, 0, 0, 4.12293e53, 0, 1.15821e58;
    0, 0, 0, 0, 0, 0, 0, 0, 0, 0, 0, 0, 4.11118e53, 0, 1.14959e58, 0;
    0, 0, 0, 0, 0, 0, 0, 0, 0, 0, 0, 4.12293e53, 0, 1.14676e58, 0, 3.23925e62;
    0, 0, 0, 0, 0, 0, 0, 0, 0, 0, 4.15878e53, 0, 1.14959e58, 0, 3.23229e62, 0;
    0, 0, 0, 0, 0, 0, 0, 0, 0, 4.22067e53, 0, 1.15821e58, 0, 3.23925e62, 0, 9.19365e66
]
# //правильная запись
# //В методичке ошибка
f(t) := e^(-(t/90)^2/2) - e^(-5*(t/90)^2/2)
f(t) := e^(-(t/90)^2/2) - e^(-5*(t/90)^2)/5
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q(i, j) := integral(f(t)*S1(t, i), t = a .. b)
Q := matrix(m, 1, q) = [0; 0; 0; 0; 0; 0; 0; 0; 3.60345e18; 0; 8.5475e22; 0; 2.13794e27; 0; 5.55307e31; 0]
X := W^-1*Q = [0.80003; 0; 3.69652e-5; 0; -6.84521e-9; 0; 4.20716e-13; 0; 0; 0; 0; 0; 0; 0; 0; 0]
fa(t) := sum(X[i]*S1(t, i), i = 0 .. m - 1)
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